// SBML level 3 version 1

model __main()

  // Compartments:
  compartment default_compartment = 1;

  // Species:
  species A in default_compartment = 50/default_compartment;
  species B in default_compartment = 0.1/default_compartment;
  species M in default_compartment = 0.1/default_compartment;
  species E in default_compartment = 0.05/default_compartment;
  species R in default_compartment = 8.3145/default_compartment;
  species W in default_compartment = 0.1/default_compartment;

  // Parameters:
  kcat1 = 10;
  Ka = 0.1;
  Kb = 0.1;
  Km = 0.1;
  dG0 = -1000;
  T = 298;
  kcat2 = 10;
  Kr = 0.1;
  Kw = 0.1;
  Ke = 0.1;
  dG1 = -1000;
  kdeg = 0.1;

  // Reactions:
  _J1: A -> B + M; kcat1*E*(A/Ka)/(1 + A/Ka + B/Kb*(M/Km))*(1 - exp(dG0/(R*T) + ln(B*M/A)));  // modifiers: E, R
  _J2: B + M -> R + W + E; kcat2*R*(B/Kb)*(M/Km)/(1 + B/Kb*(M/Km) + R/Kr*(W/Kw)*(E/Ke))*(1 - exp(dG1/(R*T) + ln(R*W*E/(B*M))));
  _J3: R -> W; kdeg*R;
  _J4: E -> W; kdeg*E;
end
