// SBML level 3 version 1

model __main()

  // Compartments:
  compartment default_compartment = 1;

  // Species:
  species atp in default_compartment = 2/default_compartment;
  species adp in default_compartment = 0;
  species nad in default_compartment = 0.25/default_compartment;
  species nadh in default_compartment = 0;
  species ppi in default_compartment = 25/default_compartment;
  species pppi in default_compartment = 0;
  species pep in default_compartment = 33/default_compartment;
  species pyr in default_compartment = 0;
  species m in default_compartment = 0;
  species P in default_compartment = 0;
  species Pmat in default_compartment = 0;

  // Parameters:
  VmaxPyk = 1;
  Keq11 = 5000;
  Kadp11 = 0.3;
  Kpep11 = 0.3;
  Katp11 = 1;
  Kpyr11 = 1;
  VmaxPpase = 20;
  Keq22 = 10;
  Kpppi22 = 0.1;
  Kppi22 = 0.1;
  VmaxNoxe = 1;
  Knadh23 = 0.1;
  Vmaxtx = 2e-5;
  d = 1e-6;
  KTX = 1e-5;
  Katp = 1;
  kdeg = 0.0001;
  Vmaxtl = 2e-6;
  KTL = 0.0001;
  kmat = 0.0005;
  Vmax = 1;

  // Reactions:
  _J11: 3 pep + 3 adp -> 3 pyr + 3 atp; VmaxPyk*(pep*adp - pyr*atp/Keq11)/(Kadp11*Kpep11)*1/((1 + adp/Kadp11)*(1 + pep/Kpep11) + (1 + atp/Katp11)*(1 + pyr/Kpyr11) - 1);
  _J22: 2 pppi -> 4 ppi; VmaxPpase*(pppi - ppi*ppi/Keq22)/Kpppi22*1/(1 + pppi/Kpppi22 + (1 + ppi/Kppi22)*(1 + ppi/Kppi22) - 1);
  _J23: 4 nadh -> 4 nad; VmaxNoxe*nadh/(Knadh23 + nadh);
  _Jdegpep: pep -> ppi; 0.001*pep;
  _JTX: 170 atp -> 170 adp + 170 ppi + m; Vmaxtx*d/(d + KTX)*atp/(atp + Katp);
  _Jdeg: m -> ; kdeg*m;
  _JTL: 904 atp -> 904 adp + 904 ppi + P; Vmaxtl*m/(m + KTL)*atp/(atp + Katp);  // modifiers: m
  _JMat: P -> Pmat; kmat*P;
end
